a := 3
b := -0.75
c := 0.1*10^-3
d := 2 - 3i
m := (a^2 + cos(b))/(c + a*b)
n := (|d| - a*d)*b/c
sin(a + π/2) = -0.989992
Результат
a = 3
b = -0.75
c = 0.0001
d = 2 - 3i
m = -4.32539
n = 17958.4 - 67500i
_________________________________________________
i := 0 .. 2
j := 0 .. 2
x[i] := i^3
y := [1, 2, 3]
A[i, j] := i + j
B := [1, 4, 7; 2, 5, 8; 3, 6, 9]
C := transpose(B)
D := (A*C)^-1
Результат
x = [0; 1; 8]
transpose(y) = [1; 2; 3]
A = [0, 1, 2; 1, 2, 3; 2, 3, 4]
B = [1, 4, 7; 2, 5, 8; 3, 6, 9]
C = [1, 2, 3; 4, 5, 6; 7, 8, 9]
D = [
    5.70076e13, -1.14015e14, 5.70076e13;
    -1.14015e14, 2.2803e14, -1.14015e14;
    5.70076e13, -1.14015e14, 5.70076e13
]
s := A[:, 1]
s = [1; 2; 3]
E := A + B - 2*x*y
E = [1, 5, 9; 1, 3, 5; -11, -23, -35]
D := |E|
D = 0
k := 0 .. 2
r := -2, -1.5 .. 0.5
k = [0; 1; 2]
r = [-2; -1.5; -1; -0.5; 0; 0.5]
j := 0 .. 6
z[:, 0] := [0; 1; 2]
z[:, j + 1] := z[:, j] + [1; 1; 1]
z = [0, 1, 2, 3, 4, 5, 6, 7; 1, 2, 3, 4, 5, 6, 7, 8; 2, 3, 4, 5, 6, 7, 8, 9]
